**------------------------------------------------------------------------------
**INDENTATION SIMULATION
**------------------------------------------------------------------------------
*HEADING
Abapy Indentation Simulation
*PREPRINT, ECHO=NO, MODEL=NO, HISTORY=NO, CONTACT=NO
**------------------------------------------------------------------------------
** SAMPLE DEFINITION
**------------------------------------------------------------------------------
*PART, NAME = P_SAMPLE
**------------------------------------------------------------------------------
** NODES
**------------------------------------------------------------------------------
*NODE, NSET=ALLNODES
1, 0.0, 0.0, 0.0
2, 1.5, 0.0, 0.0
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**------------------------------------------------------------------------------
** NODE SETS
**------------------------------------------------------------------------------
*NSET, NSET=TOP
5,6,97,98,99,100
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*NSET, NSET=REF_NODE
6,
*NSET, NSET=SYM_Y
1,2,7,8,9,10,11,12,13,
*NSET, NSET=SYM_X
1,6,114,115,116,117
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*NSET, NSET=SURFACE
2,3,4,5,14,15
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**------------------------------------------------------------------------------
** ELEMENTS
**------------------------------------------------------------------------------
*ELEMENT, TYPE=CAX4, ELSET=CAX4_ELEMENTS
193, 805, 738, 884, 869,
194, 773, 774, 649, 562,
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**------------------------------------------------------------------------------
** ELEMENT SETS
**------------------------------------------------------------------------------
*ELSET, ELSET=_SURF_SURFACE_FACE1
254,260,285,326,997,
*ELSET, ELSET=_SURF_SURFACE_FACE3
227,238,264,265,297,311
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*ELSET, ELSET=ALL_ELEMENTS
193,194,195,196,197,198
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*ELSET, ELSET=_SURF_SURFACE_FACE4
911,981,
*ELSET, ELSET=_SURF_SURFACE_FACE2
232,254,278,308,312,348
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**------------------------------------------------------------------------------
** SURFACES
**------------------------------------------------------------------------------
*SURFACE, TYPE=ELEMENT, NAME=SURFACE
  _SURF_SURFACE_FACE3, S3
  _SURF_SURFACE_FACE2, S2
  _SURF_SURFACE_FACE1, S1
  _SURF_SURFACE_FACE4, S4
*SOLID SECTION, ELSET = ALL_ELEMENTS, MATERIAL = SAMPLE_MAT
*RIGID BODY, REF NODE = REF_NODE, PIN NSET=TOP
*END PART
**------------------------------------------------------------------------------
** ASSEMBLY
**------------------------------------------------------------------------------
*ASSEMBLY, NAME = ASSEMBLY
*INSTANCE, NAME = I_SAMPLE, PART = P_SAMPLE
*END INSTANCE
*END ASSEMBLY
**------------------------------------------------------------------------------
** MATERIALS
**------------------------------------------------------------------------------
** SAMPLE MATERIAL
** <VonMises instance: 1 samples>
*MATERIAL, NAME=SAMPLE_MAT
*ELASTIC
200.E3,.3
*PLASTIC
200.,0.
220.,.0009
220.,.0029
**------------------------------------------------------------------------------
** STEPS
**------------------------------------------------------------------------------
**------------------------------------------------------------------------------
** STEP: LOADING1
**------------------------------------------------------------------------------
*STEP, NAME = LOADING1, NLGEOM = YES, INC=1000000
*STATIC, DIRECT
0.01, 1.0
*BOUNDARY, OP=NEW
I_SAMPLE.SYM_X, XSYMM
I_SAMPLE.SYM_Y, YSYMM
I_SAMPLE.REF_NODE,2,, 1.0
*RESTART, WRITE, FREQUENCY = 0
*OUTPUT, FIELD, FREQUENCY = 1
*NODE OUTPUT
COORD, U,
*ELEMENT OUTPUT, ELSET=I_SAMPLE.ALL_ELEMENTS, DIRECTIONS = YES
LE, EE, PE, PEEQ, S,
*OUTPUT, HISTORY
*ENERGY OUTPUT
ALLFD, ALLWK
*ENERGY OUTPUT, ELSET=I_SAMPLE.ALL_ELEMENTS
ALLPD, ALLSE
*NODE OUTPUT, NSET=I_SAMPLE.REF_NODE
U2, RF2
*NODE OUTPUT, NSET = I_SAMPLE.SURFACE
COOR1, COOR2, COOR3
*END STEP
